// COMSOL Multiphysics 6.0.0.405 model "flow through a uniform inclined screen - without run.mph"
// Outline of the model tree

Parameters
  theta = pi/18  // Angle of inclination
  u_in = 1[m/s]  // Inlet velocity

Geometry
  geom1 "Geometry 1" (2D, length unit m)
    r1: Rectangle | pos = {-2, 0}; size = {4, 1}
    pol1: Polygon | x = -0.5*tan(theta) 0.5*tan(theta); y = {0, 1}
    fin: Finalize "Form Union"

Materials
  mat1: Common "Air" on all domains
    def "Basic"
      thermalexpansioncoefficient = alpha_p(pA,T)
      molarmass = 0.02897[kg/mol]
      bulkviscosity = muB(T)
      relpermeability = 1
      relpermittivity = 1
      dynamicviscosity = eta(T)
      ratioofspecificheat = 1.4
      electricconductivity = 0[S/m]
      heatcapacity = Cp(T)
      density = rho(pA,T)
      thermalconductivity = k(T)
      soundspeed = cs(T)
      eta: Piecewise | arg = T; pieces = {200.0, 1600.0, -8.38278E-7+8.35717342E-8*T^1-7.69429583E-11*T^2+4.6437266E-14*T^3-1.06585607E-17*T^4}; argunit = K; fununit = Pa*s
      Cp: Piecewise | arg = T; pieces = {200.0, 1600.0, 1047.63657-0.372589265*T^1+9.45304214E-4*T^2-6.02409443E-7*T^3+1.2858961E-10*T^4}; argunit = K; fununit = J/(kg*K)
      rho: Analytic | expr = pA*0.02897/R_const[K*mol/J]/T; args = {pA, T}; fununit = kg/m^3; argunit = {Pa, K}
      k: Piecewise | arg = T; pieces = {200.0, 1600.0, -0.00227583562+1.15480022E-4*T^1-7.90252856E-8*T^2+4.11702505E-11*T^3-7.43864331E-15*T^4}; argunit = K; fununit = W/(m*K)
      cs: Analytic | expr = sqrt(1.4*R_const[K*mol/J]/0.02897*T); args = T; fununit = m/s; argunit = K
      an1: Analytic | funcname = alpha_p; expr = -1/rho(pA,T)*d(rho(pA,T),T); args = {pA, T}; fununit = 1/K; argunit = {Pa, K}
      an2: Analytic "Analytic 2a" | funcname = muB; expr = 0.6*eta(T); args = T; fununit = Pa*s; argunit = K
    RefractiveIndex
      n = 1
      ki = 0
    NonlinearModel
      BA = (def.gamma+1)/2
    idealGas
      Rs = R_const/Mn
      heatcapacity = Cp(T)
      ratioofspecificheat = 1.4
      molarmass = 0.02897
      Cp: Piecewise | arg = T; pieces = {200.0, 1600.0, 1047.63657-0.372589265*T^1+9.45304214E-4*T^2-6.02409443E-7*T^3+1.2858961E-10*T^4}; argunit = K; fununit = J/(kg*K)

Physics
  spf: LaminarFlow on all domains
    dependent variable u = {u, v, w}
    fp1: FluidProperties (default)
    init1: init "Initial Values 1" (default)
    wallbc1: WallBC "Wall 1" (default) | BoundaryCondition = Slip
    inl1: InletBoundary "Inlet 1" on boundaries 1 | U0in = u_in
    out1: OutletBoundary "Outlet 1" on boundaries 7 | NormalFlow = 1
    sc1: Screen on boundaries 4
      ScreenType = userdef
      resistanceCoeff = 2.2
      refractionCoeff = 0.78
      Refraction = userdef

Mesh
  mesh1 "Mesh 1" (physics-controlled)
    size: MeshSizeDefault | table = cfd; hauto = 6

Studies
  std1 "Study 1"
    param: Parametric "Parametric Sweep" | pname = theta; plistarr = pi/18, pi/9, pi/6, 2*pi/9, pi/4
    stat: Stationary

Solver configurations
  sol1 "Solution 1" (study std1)
    v1: Variables "Dependent Variables 1"
    s1: Stationary "Stationary Solver 1"
      fc1: FullyCoupled | linsolver = d1; initstep = 0.01; maxiter = 100
      d1: Direct "Direct, fluid flow variables (spf)" | linsolver = pardiso; pivotperturb = 1.0E-13
  sol2 "Parametric Solutions 1" (study std1)

Datasets
  dset1: Solution | solution = sol1
  dset2: Solution | solution = sol2

Plots
  pg1: PlotGroup2D "Velocity (spf)"
    data = dset2
    title = Pressure drop (Pa) and up/downstream velocity vectors on screen
    surf1: Surface | expr = p
    arwl1: ArrowLine | expr = {up(u), up(v)}; arrowcount = 30
      sel1: Selection on boundaries 4
      def1: Deform "Deformation 1" | expr = {-0.05, 0}
    arwl2: ArrowLine | expr = {down(u), down(v)}; arrowcount = 30
      sel1: Selection on boundaries 4
      def1: Deform "Deformation 1" | expr = {0.05, 0}
  pg2: PlotGroup2D "Pressure (spf)" | data = dset2
    con1: Contour | expr = p; levelrounding = off
  pg3: PlotGroup1D "1D Plot Group 3" | data = dset1; title = Normalized streamwise velocity component downstream
    lngr1: LineGraph on boundaries 7 | expr = 2/pi*log(cot(pi*y/2)); xdata = expr; xdataexpr = y
    lngr2: LineGraph on boundaries 7
      data = dset2
      expr = (u/u_in-1)/(1-0.78)/2.2/cos(theta)^2*(1+0.78+2.2*cos(theta)^2)/tan(theta)
      xdata = expr
      xdataexpr = y
      legends = pi/18
    lngr3: LineGraph on boundaries 7
      data = dset2
      expr = (u/u_in-1)/(1-0.78)/2.2/cos(theta)^2*(1+0.78+2.2*cos(theta)^2)/tan(theta)
      xdata = expr
      xdataexpr = y
      legends = pi/9
    lngr4: LineGraph on boundaries 7
      data = dset2
      expr = (u/u_in-1)/(1-0.78)/2.2/cos(theta)^2*(1+0.78+2.2*cos(theta)^2)/tan(theta)
      xdata = expr
      xdataexpr = y
      legends = pi/6
    lngr5: LineGraph on boundaries 7
      data = dset2
      expr = (u/u_in-1)/(1-0.78)/2.2/cos(theta)^2*(1+0.78+2.2*cos(theta)^2)/tan(theta)
      xdata = expr
      xdataexpr = y
      legends = 2pi/9
    lngr6: LineGraph on boundaries 7
      data = dset2
      expr = (u/u_in-1)/(1-0.78)/2.2/cos(theta)^2*(1+0.78+2.2*cos(theta)^2)/tan(theta)
      xdata = expr
      xdataexpr = y
      legends = pi/4

Exports
  anim1: Animation | target = player
  anim2: Animation | target = player